# ---------- Initialize Simulation ---------------------
units           metal
dimension       3
boundary        p p s
atom_style      atomic

read_data       bulk_ni3al_small.data
replicate 1 1 1
# ---------- Define Interatomic Potential ---------------------

# Need to be careful which potential file is used (cpu or gpu)
# The arguments are MAX_ATOMS and MAX_NEIGHBORS (need to match with whatever the .bin file was compiled!)
pair_style jax/mtp_direct jax_potential_gpu.bin 6500 200
pair_coeff * *

neighbor 1.5 bin
neigh_modify every 1 delay 5 check yes

mass 1 26.98  # Al
mass 2 58.69  # Ni

######################################
# Variable
variable        temperature     equal   300      # Kelvin

# ------------------------- SETTINGS ---------------------------------
# Define computes for dumping
compute csym all centro/atom fcc
compute peratom all pe/atom

minimize 1.0e-4 1.0e-6 100 1000
reset_timestep 0

fix 1 all nvt temp ${temperature} ${temperature} 0.1

thermo         50
thermo_style   custom step temp vol pxx pyy pzz pe ke etotal

timestep 0.0005

# ------------------------- DUMP STATEMENTS ---------------------------------
# Option 1: Basic XYZ dump (most compatible)
dump xyz_dump all xyz 50 trajectory.dump

# Option 2: Custom dump with forces and energy
dump custom_dump all custom 50 trajectory.lammpstrj id type x y z fx fy fz c_peratom
dump_modify custom_dump element Al Ni

# Option 3: CFG dump with all properties (original style, but corrected)
dump cfg_dump all cfg 100 dump.equil_*.cfg mass type xs ys zs c_csym c_peratom fx fy fz
dump_modify cfg_dump element Al Ni

# Choose one of the above - comment out the others
# Recommended: use xyz_dump for simplicity or custom_dump for detailed analysis

run 5000

# Clean output
print "All Done!"
print "Trajectory written to trajectory.xyz"
print "Custom trajectory written to trajectory.lammpstrj"
